*Heading
** Job name: Job-1 Model name: Model-1
** Generated by: Abaqus/CAE 6.13-1
*Preprint, echo=NO, model=NO, history=NO, contact=NO
**
** PARTS
**
*Part, name=Part-1
*Node
      1,           1.,           1.,           3.
      2,           1.,         0.75,           3.
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*Element, type=C3D8R
  1,  66,  67,  72,  71,   1,   2,   7,   6
  2,  67,  68,  73,  72,   2,   3,   8,   7
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*Nset, nset=Set-1
  61,  62,  63,  64,  65, 126
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*Elset, elset=Set-1
  45,  46,  47,  48,  93,  94,  95,  96, 141, 142, 143, 144, 189, 190, 191, 192
*Nset, nset=Set-2
   1,   2,   3,   4,   5,  66
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*Elset, elset=Set-2
   1,   2,   3,   4,  49,  50,  51,  52,  97,  98,  99, 100, 145, 146, 147, 148
*End Part
**
**
** ASSEMBLY
**
*Assembly, name=Assembly
**
*Instance, name=Part-1-1, part=Part-1
*End Instance
**
*End Assembly
**
** MATERIALS
**
*Material, name=steel
*Elastic
26., 0.3
